# OpenSim document version 40000
XsensDataReaderSettings:
  trial_prefix: XSDot_20240320_161737
  ExperimentalSensors:
    ExperimentalSensor _Xsens DOT1: name_in_model=pelvis_imu
    ExperimentalSensor _Xsens DOT 2: name_in_model=femur_r_imu
    ExperimentalSensor _Xsens DOT 3: name_in_model=femur_l_imu
    ExperimentalSensor _Xsens DOT 4: name_in_model=tibia_r_imu
    ExperimentalSensor _Xsens DOT 5: name_in_model=tibia_l_imu
